// SBML level 2 version 1

model CuEfflux_Model_v1_1()

  // Compartments:
  compartment default = 1 litre;

  // Species:
  substanceOnly species Cu in default = 0;  // substance in item
  substanceOnly species Cu_out in default = 500000;  // substance in item
  substanceOnly species D0700 in default = 25;  // substance in item
  substanceOnly species Dgfp in default = 25;  // substance in item
  substanceOnly species M0700 in default = 0;  // substance in item
  substanceOnly species M0702 in default = 0;  // substance in item
  substanceOnly species M2581 in default = 0;  // substance in item
  substanceOnly species Mgfp in default = 0;  // substance in item
  substanceOnly species P0700 in default = 0;  // substance in item
  substanceOnly species P0700_Cu in default = 0;  // substance in item
  substanceOnly species P0702_Cu in default = 0;  // substance in item
  substanceOnly species P0702_Cu_P0700 in default = 0;  // substance in item
  substanceOnly species P0702_Cu_P1179 in default = 0;  // substance in item
  substanceOnly species P0702_Cu_Q in default = 0;  // substance in item
  substanceOnly species P2581_Cu in default = 0;  // substance in item
  substanceOnly species P2581_Cu_P0700 in default = 0;  // substance in item
  substanceOnly species P2581_Cu_P1179 in default = 0;  // substance in item
  substanceOnly species P2581_Cu_Q in default = 0;  // substance in item
  substanceOnly species P0702_Cu_P2581 in default = 0;  // substance in item
  substanceOnly species P1179 in default = 150;  // substance in item
  substanceOnly species P1179_Cu in default = 0;  // substance in item
  substanceOnly species P1179_Cu_D0700 in default = 0;  // substance in item
  substanceOnly species P1179_Cu_D0702 in default = 0;  // substance in item
  substanceOnly species P1179_Cu_D2581 in default = 0;  // substance in item
  substanceOnly species P1179_Cu_Dgfp in default = 0;  // substance in item
  substanceOnly species Pgfp in default = 0;  // substance in item
  substanceOnly species Q in default = 1000;  // substance in item
  substanceOnly species Q_Cu in default = 0;  // substance in item
  substanceOnly species V in default = 1;  // substance in item
  substanceOnly species D0702 in default = 25;  // substance in item
  substanceOnly species D2581 in default = 25;  // substance in item
  substanceOnly species OE0702 in default = 0;  // substance in item
  substanceOnly species OE2581 in default = 0;  // substance in item
  substanceOnly species P0702 in default = 350;  // substance in item
  substanceOnly species P2581 in default = 350;  // substance in item

  // Parameters:
  k_Cu_export = 0.1;
  Cu_PartCoef = 1000;
  k_Cu_Import_BaseRate = 1e-5;
  k_D0700_P1179_Cu_binding = 0.01;
  k_D0700_P1179_Cu_dissociation = 0.1;
  k_D0702_P1179_Cu_binding = 0.01;
  k_D0702_P1179_Cu_dissociation = 0.1;
  k_D2581_P1179_Cu_binding = 0.01;
  k_D070X_P1179_P2581_Cu_Y_binding = 0.01;
  k_D2581_P1179_Cu_dissociation = 0.1;
  k_Dgfp_P1179_Cu_binding = 0.01;
  k_Dgfp_P1179_Cu_dissociation = 0.1;
  k_M0700_degradation = 0.00180197;
  k_M0700_transcription = 0.207918;
  k_M0702_degradation = 0.00136725;
  k_M0702_transcription = 0.646571;
  k_M2581_degradation = 0.003262;
  k_M2581_transcription = 0.424167;
  k_Mgfp_degradation = 0.001;
  k_Mgfp_transcription = 0.138889;
  k_OE0702_transcription = 0.00646571;
  k_OE2581_transcription = 0.00424167;
  k_P0700_Cu_by_P0702_F1 = 0.01;
  k_P0700_Cu_by_P0702_R1 = 0.1;
  k_P0700_Cu_by_P0702_F2 = 1;
  k_P0700_Cu_by_P2581_F1 = 0.01;
  k_P0700_Cu_by_P2581_R1 = 0.1;
  k_P0700_Cu_by_P2581_F2 = 0.1;
  k_P0700_Cu_dissociation = 0.0001;
  k_P0700_Cu_non_specific = 0.001;
  k_P0700_degradation = 0;
  k_P0700_translation = 0.002331;
  k_P0702_Cu_bind = 0.01;
  k_P0702_Cu_by_P1179_F1 = 0.01;
  k_P0702_Cu_by_Q_F1 = 0.001;
  k_P0702_Cu_by_P2581_F1 = 0;
  k_P0702_Cu_by_P2581_R1 = 0;
  k_P0702_Cu_debind = 0.001;
  k_P0702_Cu_degradation = 0;
  k_P0702_degradation = 0;
  k_P0702_translation = 0.0289855;
  k_P2581_Cu_bind = 0.01;
  k_P2581_Cu_by_P1179_F1 = 0.01;
  k_P2581_Cu_by_P0702_F1 = 0;
  k_P2581_Cu_by_P0702_R1 = 0;
  k_P2581_Cu_by_Q_F1 = 0.001;
  k_P2581_Cu_debind = 0.001;
  k_P2581_Cu_degradation = 0;
  k_P2581_degradation = 0;
  k_P2581_translation = 0.030769231;
  k_P1179_Cu_by_P0702_F1 = 0.01;
  k_P1179_Cu_by_P0702_R1 = 0.1;
  k_P1179_Cu_by_P0702_F2 = 0.1;
  k_P1179_Cu_by_P2581_F1 = 0.01;
  k_P1179_Cu_by_P2581_R1 = 0.1;
  k_P1179_Cu_by_P2581_F2 = 0.01;
  k_P1179_Cu_dissociation = 0.0001;
  k_P1179_Cu_non_specific = 0.001;
  k_Pgfp_degradation = 0;
  k_Pgfp_translation = 0.008333;
  k_Q_Cu_by_P0702_F1 = 0.01;
  k_Q_Cu_by_P0702_R1 = 0.1;
  k_Q_Cu_by_P0702_F2 = 0.1;
  k_Q_Cu_by_P2581_F1 = 0.01;
  k_Q_Cu_by_P2581_R1 = 0.1;
  k_Q_Cu_by_P2581_F2 = 1;
  k_Q_Cu_non_specific = 0.001;
  mu = 2.750584e-5;

  // Reactions:
  Cu_export: P0700_Cu => P0700; Cu_export_k_Cu_export*P0700_Cu;
    Cu_export_k_Cu_export = 0.1;
  Cu_import: => Cu; Cu_import_k_Cu_Import_BaseRate*V*Cu_out - Cu_import_k_Cu_Import_BaseRate*V*Cu_import_Cu_PartCoef*Cu - Cu_import_k_Cu_Import_BaseRate*V*Cu_import_Cu_PartCoef*P0700_Cu - Cu_import_k_Cu_Import_BaseRate*V*Cu_import_Cu_PartCoef*P0702_Cu - Cu_import_k_Cu_Import_BaseRate*V*Cu_import_Cu_PartCoef*P0702_Cu_P0700 - Cu_import_k_Cu_Import_BaseRate*V*Cu_import_Cu_PartCoef*P0702_Cu_P1179 - Cu_import_k_Cu_Import_BaseRate*V*Cu_import_Cu_PartCoef*P0702_Cu_Q - Cu_import_k_Cu_Import_BaseRate*V*Cu_import_Cu_PartCoef*P2581_Cu - Cu_import_k_Cu_Import_BaseRate*V*Cu_import_Cu_PartCoef*P2581_Cu_P0700 - Cu_import_k_Cu_Import_BaseRate*V*Cu_import_Cu_PartCoef*P2581_Cu_P1179 - Cu_import_k_Cu_Import_BaseRate*V*Cu_import_Cu_PartCoef*P2581_Cu_Q - Cu_import_k_Cu_Import_BaseRate*V*Cu_import_Cu_PartCoef*P0702_Cu_P2581 - Cu_import_k_Cu_Import_BaseRate*V*Cu_import_Cu_PartCoef*P1179_Cu - Cu_import_k_Cu_Import_BaseRate*V*Cu_import_Cu_PartCoef*P1179_Cu_D0700 - Cu_import_k_Cu_Import_BaseRate*V*Cu_import_Cu_PartCoef*P1179_Cu_D0702 - Cu_import_k_Cu_Import_BaseRate*V*Cu_import_Cu_PartCoef*P1179_Cu_D2581 - Cu_import_k_Cu_Import_BaseRate*V*Cu_import_Cu_PartCoef*P1179_Cu_Dgfp - Cu_import_k_Cu_Import_BaseRate*V*Cu_import_Cu_PartCoef*Q_Cu;  // modifiers: Cu_out, V, P0700_Cu, P0702_Cu, P0702_Cu_P0700, P0702_Cu_P1179, P0702_Cu_Q, P2581_Cu, P2581_Cu_P0700, P2581_Cu_P1179, P2581_Cu_Q, P0702_Cu_P2581, P1179_Cu, P1179_Cu_D0700, P1179_Cu_D0702, P1179_Cu_D2581, P1179_Cu_Dgfp, Q_Cu
    Cu_import_Cu_PartCoef = 1000; Cu_import_k_Cu_Import_BaseRate = 1e-5;
  D0700_P1179_Cu_binding: D0700 + P1179_Cu => P1179_Cu_D0700; D0700_P1179_Cu_binding_k_D0700_P1179_Cu_binding*P1179_Cu*D0700/V^2; D0700_P1179_Cu_binding is "D0700 P1179.Cu binding";  // modifiers: V
    D0700_P1179_Cu_binding_k_D0700_P1179_Cu_binding = 0.01;
  D0700_P1179_Cu_dissociation: P1179_Cu_D0700 => D0700 + P1179_Cu; D0700_P1179_Cu_dissociation_k_D0700_P1179_Cu_dissociation*P1179_Cu_D0700; D0700_P1179_Cu_dissociation is "D0700 P1179.Cu dissociation";
    D0700_P1179_Cu_dissociation_k_D0700_P1179_Cu_dissociation = 0.1;
  D0702_P1179_Cu_binding: P1179_Cu + D0702 => P1179_Cu_D0702; D0702_P1179_Cu_binding_k_D0702_P1179_Cu_binding*P1179_Cu*D0702/V^2; D0702_P1179_Cu_binding is "D0702 P1179.Cu binding";  // modifiers: V
    D0702_P1179_Cu_binding_k_D0702_P1179_Cu_binding = 0.01;
  D0702_P1179_Cu_dissociation: P1179_Cu_D0702 => P1179_Cu + D0702; D0702_P1179_Cu_dissociation_k_D0702_P1179_Cu_dissociation*P1179_Cu_D0702; D0702_P1179_Cu_dissociation is "D0702 P1179.Cu dissociation";
    D0702_P1179_Cu_dissociation_k_D0702_P1179_Cu_dissociation = 0.1;
  D2581_P1179_Cu_binding: P1179_Cu + D2581 => P1179_Cu_D2581; D2581_P1179_Cu_binding_k_D2581_P1179_Cu_binding*P1179_Cu*D2581/V^2; D2581_P1179_Cu_binding is "D2581 P1179.Cu binding";  // modifiers: V
    D2581_P1179_Cu_binding_k_D2581_P1179_Cu_binding = 0.01;
  D2581_P1179_Cu_dissociation: P1179_Cu_D2581 => P1179_Cu + D2581; D2581_P1179_Cu_dissociation_k_D2581_P1179_Cu_dissociation*P1179_Cu_D2581; D2581_P1179_Cu_dissociation is "D2581 P1179.Cu dissociation";
    D2581_P1179_Cu_dissociation_k_D2581_P1179_Cu_dissociation = 0.1;
  Dgfp_P1179_Cu_binding: Dgfp + P1179_Cu => P1179_Cu_Dgfp; Dgfp_P1179_Cu_binding_k_Dgfp_P1179_Cu_binding*P1179_Cu*Dgfp/V^2; Dgfp_P1179_Cu_binding is "Dgfp P1179.Cu binding";  // modifiers: V
    Dgfp_P1179_Cu_binding_k_Dgfp_P1179_Cu_binding = 0.01;
  Dgfp_P1179_Cu_dissociation: P1179_Cu_Dgfp => Dgfp + P1179_Cu; Dgfp_P1179_Cu_dissociation_k_Dgfp_P1179_Cu_dissociation*P1179_Cu_Dgfp; Dgfp_P1179_Cu_dissociation is "Dgfp P1179.Cu dissociation";
    Dgfp_P1179_Cu_dissociation_k_Dgfp_P1179_Cu_dissociation = 0.1;
  M0700_degradation: M0700 => ; M0700_degradation_k_M0700_degradation*M0700;
    M0700_degradation_k_M0700_degradation = 0.00180197;
  M0700_transcription: P1179_Cu_D0700 => D0700 + M0700 + P1179_Cu; M0700_transcription_k_M0700_transcription*P1179_Cu_D0700;
    M0700_transcription_k_M0700_transcription = 0.207918;
  M0702_degradation: M0702 => ; M0702_degradation_k_M0702_degradation*M0702;
    M0702_degradation_k_M0702_degradation = 0.00136725;
  M0702_transcription: P1179_Cu_D0702 => M0702 + P1179_Cu + D0702; M0702_transcription_k_M0702_transcription*P1179_Cu_D0702;
    M0702_transcription_k_M0702_transcription = 0.646571;
  M2581_degradation: M2581 => ; M2581_degradation_k_M2581_degradation*M2581;
    M2581_degradation_k_M2581_degradation = 0.003262;
  M2581_transcription: P1179_Cu_D2581 => M2581 + P1179_Cu + D2581; M2581_transcription_k_M2581_transcription*P1179_Cu_D2581;
    M2581_transcription_k_M2581_transcription = 0.424167;
  Mgfp_degradation: Mgfp => ; Mgfp_degradation_k_Mgfp_degradation*Mgfp;
    Mgfp_degradation_k_Mgfp_degradation = 0.001;
  Mgfp_transcription: P1179_Cu_Dgfp => Dgfp + Mgfp + P1179_Cu; Mgfp_transcription_k_Mgfp_transcription*P1179_Cu_Dgfp;
    Mgfp_transcription_k_Mgfp_transcription = 0.138889;
  OE0702_transcription: => M0702; OE0702_transcription_k_OE0702_transcription*OE0702;  // modifiers: OE0702
    OE0702_transcription_k_OE0702_transcription = 0.00646571;
  OE2581_transcription: => M2581; OE2581_transcription_k_OE2581_transcription*OE2581;  // modifiers: OE2581
    OE2581_transcription_k_OE2581_transcription = 0.00424167;
  P0700_Cu_by_P0702_F1: P0700 + P0702_Cu => P0702_Cu_P0700; P0700_Cu_by_P0702_F1_k_P0700_Cu_by_P0702_F1*P0702_Cu*P0700/V^2; P0700_Cu_by_P0702_F1 is "P0700.Cu by P0702 F1";  // modifiers: V
    P0700_Cu_by_P0702_F1_k_P0700_Cu_by_P0702_F1 = 0.01;
  P0700_Cu_by_P0702_R1: P0702_Cu_P0700 => P0700 + P0702_Cu; P0700_Cu_by_P0702_R1_k_P0700_Cu_by_P0702_R1*P0702_Cu_P0700; P0700_Cu_by_P0702_R1 is "P0700.Cu by P0702 R1";
    P0700_Cu_by_P0702_R1_k_P0700_Cu_by_P0702_R1 = 0.1;
  P0700_Cu_by_P0702_F2: P0702_Cu_P0700 => P0700_Cu + P0702; P0700_Cu_by_P0702_F2_k_P0700_Cu_by_P0702_F2*P0702_Cu_P0700; P0700_Cu_by_P0702_F2 is "P0700.Cu by P0702 F2";
    P0700_Cu_by_P0702_F2_k_P0700_Cu_by_P0702_F2 = 1;
  P0700_Cu_by_P2581_F1: P0700 + P2581_Cu => P2581_Cu_P0700; P0700_Cu_by_P2581_F1_k_P0700_Cu_by_P2581_F1*P2581_Cu*P0700/V^2; P0700_Cu_by_P2581_F1 is "P0700.Cu by P2581 F1";  // modifiers: V
    P0700_Cu_by_P2581_F1_k_P0700_Cu_by_P2581_F1 = 0.01;
  P0700_Cu_by_P2581_R1: P2581_Cu_P0700 => P0700 + P2581_Cu; P0700_Cu_by_P2581_R1_k_P0700_Cu_by_P2581_R1*P2581_Cu_P0700; P0700_Cu_by_P2581_R1 is "P0700.Cu by P2581 R1";
    P0700_Cu_by_P2581_R1_k_P0700_Cu_by_P2581_R1 = 0.1;
  P0700_Cu_by_P2581_F2: P2581_Cu_P0700 => P0700_Cu + P2581; P0700_Cu_by_P2581_F2_k_P0700_Cu_by_P2581_F2*P2581_Cu_P0700; P0700_Cu_by_P2581_F2 is "P0700.Cu by P2581 F2";
    P0700_Cu_by_P2581_F2_k_P0700_Cu_by_P2581_F2 = 0.1;
  P0700_Cu_dissociation: P0700_Cu => Cu + P0700; P0700_Cu_dissociation_k_P0700_Cu_dissociation*P0700_Cu; P0700_Cu_dissociation is "P0700.Cu dissociation";
    P0700_Cu_dissociation_k_P0700_Cu_dissociation = 0.0001;
  P0700_Cu_non_specific: Cu + P0700 => P0700_Cu; P0700_Cu_non_specific_k_P0700_Cu_non_specific*P0700*Cu/V^2; P0700_Cu_non_specific is "P0700.Cu non-specific";  // modifiers: V
    P0700_Cu_non_specific_k_P0700_Cu_non_specific = 0.001;
  P0700_degradation: P0700 => ; P0700_degradation_k_P0700_degradation*P0700;
    P0700_degradation_k_P0700_degradation = 0;
  P0700_translation: => P0700; P0700_translation_k_P0700_translation*M0700;  // modifiers: M0700
    P0700_translation_k_P0700_translation = 0.002331;
  P0702_Cu_bind: Cu + P0702 => P0702_Cu; P0702_Cu_bind_k_P0702_Cu_bind*P0702*Cu/V^2; P0702_Cu_bind is "P0702.Cu bind";  // modifiers: V
    P0702_Cu_bind_k_P0702_Cu_bind = 0.01;
  P0702_Cu_by_P1179_F1: P1179_Cu + P0702 => P0702_Cu_P1179; P0702_Cu_by_P1179_F1_k_P0702_Cu_by_P1179_F1*P0702*P1179_Cu/V^2; P0702_Cu_by_P1179_F1 is "P0702.Cu by P1179 F1";  // modifiers: V
    P0702_Cu_by_P1179_F1_k_P0702_Cu_by_P1179_F1 = 0.01;
  P0702_Cu_by_P2581_F1: P2581_Cu + P0702 => P0702_Cu_P2581; P0702_Cu_by_P2581_F1_k_P0702_Cu_by_P2581_F1*P0702*P2581_Cu/V^2; P0702_Cu_by_P2581_F1 is "P0702.Cu by P2581 F1";  // modifiers: V
    P0702_Cu_by_P2581_F1_k_P0702_Cu_by_P2581_F1 = 0;
  P0702_Cu_by_P2581_R1: P0702_Cu_P2581 => P2581_Cu + P0702; P0702_Cu_by_P2581_R1_k_P0702_Cu_by_P2581_R1*P0702_Cu_P2581; P0702_Cu_by_P2581_R1 is "P0702.Cu by P2581 R1";
    P0702_Cu_by_P2581_R1_k_P0702_Cu_by_P2581_R1 = 0;
  P0702_Cu_by_Q_F1: Q_Cu + P0702 => P0702_Cu_Q; P0702_Cu_by_Q_F1_k_P0702_Cu_by_Q_F1*P0702*Q_Cu/V^2; P0702_Cu_by_Q_F1 is "P0702.Cu by Q F1";  // modifiers: V
    P0702_Cu_by_Q_F1_k_P0702_Cu_by_Q_F1 = 0.001;
  P0702_Cu_debind: P0702_Cu => Cu + P0702; P0702_Cu_debind_k_P0702_Cu_debind*P0702_Cu; P0702_Cu_debind is "P0702.Cu debind";
    P0702_Cu_debind_k_P0702_Cu_debind = 0.001;
  P0702_Cu_degradation: P0702_Cu => Cu; P0702_Cu_degradation_k_P0702_Cu_degradation*P0702_Cu; P0702_Cu_degradation is "P0702.Cu degradation";
    P0702_Cu_degradation_k_P0702_Cu_degradation = 0;
  P0702_degradation: P0702 => ; P0702_degradation_k_P0702_degradation*P0702;
    P0702_degradation_k_P0702_degradation = 0;
  P0702_translation: => P0702; P0702_translation_k_P0702_translation*M0702;  // modifiers: M0702
    P0702_translation_k_P0702_translation = 0.0289855;
  P2581_Cu_bind: Cu + P2581 => P2581_Cu; P2581_Cu_bind_k_P2581_Cu_bind*P2581*Cu/V^2; P2581_Cu_bind is "P2581.Cu bind";  // modifiers: V
    P2581_Cu_bind_k_P2581_Cu_bind = 0.01;
  P2581_Cu_by_P1179_F1: P1179_Cu + P2581 => P2581_Cu_P1179; P2581_Cu_by_P1179_F1_k_P2581_Cu_by_P1179_F1*P2581*P1179_Cu/V^2; P2581_Cu_by_P1179_F1 is "P2581.Cu by P1179 F1";  // modifiers: V
    P2581_Cu_by_P1179_F1_k_P2581_Cu_by_P1179_F1 = 0.01;
  P2581_Cu_by_P0702_F1: P0702_Cu + P2581 => P0702_Cu_P2581; P2581_Cu_by_P0702_F1_k_P2581_Cu_by_P0702_F1*P2581*P0702_Cu/V^2; P2581_Cu_by_P0702_F1 is "P2581.Cu by P0702 F1";  // modifiers: V
    P2581_Cu_by_P0702_F1_k_P2581_Cu_by_P0702_F1 = 0;
  P2581_Cu_by_P0702_R1: P0702_Cu_P2581 => P0702_Cu + P2581; P2581_Cu_by_P0702_R1_k_P2581_Cu_by_P0702_R1*P0702_Cu_P2581; P2581_Cu_by_P0702_R1 is "P2581.Cu by P0702 R1";
    P2581_Cu_by_P0702_R1_k_P2581_Cu_by_P0702_R1 = 0;
  P2581_Cu_by_Q_F1: Q_Cu + P2581 => P2581_Cu_Q; P2581_Cu_by_Q_F1_k_P2581_Cu_by_Q_F1*P2581*Q_Cu/V^2; P2581_Cu_by_Q_F1 is "P2581.Cu by Q F1";  // modifiers: V
    P2581_Cu_by_Q_F1_k_P2581_Cu_by_Q_F1 = 0.001;
  P2581_Cu_debind: P2581_Cu => Cu + P2581; P2581_Cu_debind_k_P2581_Cu_debind*P2581_Cu; P2581_Cu_debind is "P2581.Cu debind";
    P2581_Cu_debind_k_P2581_Cu_debind = 0.001;
  P2581_Cu_degradation: P2581_Cu => Cu; P2581_Cu_degradation_k_P2581_Cu_degradation*P2581_Cu; P2581_Cu_degradation is "P2581.Cu degradation";
    P2581_Cu_degradation_k_P2581_Cu_degradation = 0;
  P2581_degradation: P2581 => ; P2581_degradation_k_P2581_degradation*P2581;
    P2581_degradation_k_P2581_degradation = 0;
  P2581_translation: => P2581; P2581_translation_k_P2581_translation*M2581;  // modifiers: M2581
    P2581_translation_k_P2581_translation = 0.030769231;
  P1179_Cu_by_P0702_F1: P0702_Cu + P1179 => P0702_Cu_P1179; P1179_Cu_by_P0702_F1_k_P1179_Cu_by_P0702_F1*P1179*P0702_Cu/V^2; P1179_Cu_by_P0702_F1 is "P1179.Cu by P0702 F1";  // modifiers: V
    P1179_Cu_by_P0702_F1_k_P1179_Cu_by_P0702_F1 = 0.01;
  P1179_Cu_by_P0702_R1: P0702_Cu_P1179 => P0702_Cu + P1179; P1179_Cu_by_P0702_R1_k_P1179_Cu_by_P0702_R1*P0702_Cu_P1179; P1179_Cu_by_P0702_R1 is "P1179.Cu by P0702 R1";
    P1179_Cu_by_P0702_R1_k_P1179_Cu_by_P0702_R1 = 0.1;
  P1179_Cu_by_P0702_F2: P0702_Cu_P1179 => P1179_Cu + P0702; P1179_Cu_by_P0702_F2_k_P1179_Cu_by_P0702_F2*P0702_Cu_P1179; P1179_Cu_by_P0702_F2 is "P1179.Cu by P0702 F2";
    P1179_Cu_by_P0702_F2_k_P1179_Cu_by_P0702_F2 = 0.1;
  P1179_Cu_by_P2581_F1: P2581_Cu + P1179 => P2581_Cu_P1179; P1179_Cu_by_P2581_F1_k_P1179_Cu_by_P2581_F1*P1179*P2581_Cu/V^2; P1179_Cu_by_P2581_F1 is "P1179.Cu by P2581 F1";  // modifiers: V
    P1179_Cu_by_P2581_F1_k_P1179_Cu_by_P2581_F1 = 0.01;
  P1179_Cu_by_P2581_R1: P2581_Cu_P1179 => P2581_Cu + P1179; P1179_Cu_by_P2581_R1_k_P1179_Cu_by_P2581_R1*P2581_Cu_P1179; P1179_Cu_by_P2581_R1 is "P1179.Cu by P2581 R1";
    P1179_Cu_by_P2581_R1_k_P1179_Cu_by_P2581_R1 = 0.1;
  P1179_Cu_by_P2581_F2: P2581_Cu_P1179 => P1179_Cu + P2581; P1179_Cu_by_P2581_F2_k_P1179_Cu_by_P2581_F2*P2581_Cu_P1179; P1179_Cu_by_P2581_F2 is "P1179.Cu by P2581 F2";
    P1179_Cu_by_P2581_F2_k_P1179_Cu_by_P2581_F2 = 0.01;
  P1179_Cu_dissociation: P1179_Cu => Cu + P1179; P1179_Cu_dissociation_k_P1179_Cu_dissociation*P1179_Cu; P1179_Cu_dissociation is "P1179.Cu dissociation";
    P1179_Cu_dissociation_k_P1179_Cu_dissociation = 0.0001;
  P1179_Cu_non_specific: Cu + P1179 => P1179_Cu; P1179_Cu_non_specific_k_P1179_Cu_non_specific*P1179*Cu/V^2; P1179_Cu_non_specific is "P1179.Cu non-specific";  // modifiers: V
    P1179_Cu_non_specific_k_P1179_Cu_non_specific = 0.001;
  Pgfp_degradation: Pgfp => ; Pgfp_degradation_k_Pgfp_degradation*Pgfp;
    Pgfp_degradation_k_Pgfp_degradation = 0;
  Pgfp_translation: => Pgfp; Pgfp_translation_k_Pgfp_translation*Mgfp;  // modifiers: Mgfp
    Pgfp_translation_k_Pgfp_translation = 0.008333;
  Q_Cu_by_P0702_F1: P0702_Cu + Q => P0702_Cu_Q; Q_Cu_by_P0702_F1_k_Q_Cu_by_P0702_F1*P0702_Cu*Q/V^2; Q_Cu_by_P0702_F1 is "Q.Cu by P0702 F1";  // modifiers: V
    Q_Cu_by_P0702_F1_k_Q_Cu_by_P0702_F1 = 0.01;
  Q_Cu_by_P0702_R1: P0702_Cu_Q => P0702_Cu + Q; Q_Cu_by_P0702_R1_k_Q_Cu_by_P0702_R1*P0702_Cu_Q; Q_Cu_by_P0702_R1 is "Q.Cu by P0702 R1";
    Q_Cu_by_P0702_R1_k_Q_Cu_by_P0702_R1 = 0.1;
  Q_Cu_by_P0702_F2: P0702_Cu_Q => Q_Cu + P0702; Q_Cu_by_P0702_F2_k_Q_Cu_by_P0702_F2*P0702_Cu_Q; Q_Cu_by_P0702_F2 is "Q.Cu by P0702 F2";
    Q_Cu_by_P0702_F2_k_Q_Cu_by_P0702_F2 = 0.1;
  Q_Cu_by_P2581_F1: P2581_Cu + Q => P2581_Cu_Q; Q_Cu_by_P2581_F1_k_Q_Cu_by_P2581_F1*P2581_Cu*Q/V^2; Q_Cu_by_P2581_F1 is "Q.Cu by P2581 F1";  // modifiers: V
    Q_Cu_by_P2581_F1_k_Q_Cu_by_P2581_F1 = 0.01;
  Q_Cu_by_P2581_R1: P2581_Cu_Q => P2581_Cu + Q; Q_Cu_by_P2581_R1_k_Q_Cu_by_P2581_R1*P2581_Cu_Q; Q_Cu_by_P2581_R1 is "Q.Cu by P2581 R1";
    Q_Cu_by_P2581_R1_k_Q_Cu_by_P2581_R1 = 0.1;
  Q_Cu_by_P2581_F2: P2581_Cu_Q => Q_Cu + P2581; Q_Cu_by_P2581_F2_k_Q_Cu_by_P2581_F2*P2581_Cu_Q; Q_Cu_by_P2581_F2 is "Q.Cu by P2581 F2";
    Q_Cu_by_P2581_F2_k_Q_Cu_by_P2581_F2 = 1;
  Q_Cu_non_specific: Cu + Q => Q_Cu; Q_Cu_non_specific_k_Q_Cu_non_specific*Q*Cu/V^2; Q_Cu_non_specific is "Q.Cu non-specific";  // modifiers: V
    Q_Cu_non_specific_k_Q_Cu_non_specific = 0.001;
  V_growth: => V; V_growth_mu*V;
    V_growth_mu = 2.750584e-5;
  Q_growth: => Q; Q_growth_mu*P0702_Cu_Q + Q_growth_mu*P2581_Cu_Q + Q_growth_mu*Q + Q_growth_mu*Q_Cu;  // modifiers: P0702_Cu_Q, P2581_Cu_Q, Q_Cu
    Q_growth_mu = 2.750584e-5;
  P1179_growth: => P1179; P1179_growth_mu*P0702_Cu_P1179 + P1179_growth_mu*P2581_Cu_P1179 + P1179_growth_mu*P1179 + P1179_growth_mu*P1179_Cu + P1179_growth_mu*P1179_Cu_D0700 + P1179_growth_mu*P1179_Cu_D0702 + P1179_growth_mu*P1179_Cu_D2581 + P1179_growth_mu*P1179_Cu_Dgfp;  // modifiers: P0702_Cu_P1179, P2581_Cu_P1179, P1179_Cu, P1179_Cu_D0700, P1179_Cu_D0702, P1179_Cu_D2581, P1179_Cu_Dgfp
    P1179_growth_mu = 2.750584e-5;
  D0700_growth: => D0700; D0700_growth_mu*D0700 + D0700_growth_mu*P1179_Cu_D0700;  // modifiers: P1179_Cu_D0700
    D0700_growth_mu = 2.750584e-5;
  D0702_growth: => D0702; D0702_growth_mu*P1179_Cu_D0702 + D0702_growth_mu*D0702;  // modifiers: P1179_Cu_D0702
    D0702_growth_mu = 2.750584e-5;
  D2581_growth: => D2581; D2581_growth_mu*P1179_Cu_D2581 + D2581_growth_mu*D2581;  // modifiers: P1179_Cu_D2581
    D2581_growth_mu = 2.750584e-5;
  Dgfp_growth: => Dgfp; Dgfp_growth_mu*Dgfp + Dgfp_growth_mu*P1179_Cu_Dgfp;  // modifiers: P1179_Cu_Dgfp
    Dgfp_growth_mu = 2.750584e-5;
  OE0702_growth: => OE0702; OE0702_growth_mu*OE0702;
    OE0702_growth_mu = 2.750584e-5;
  OE2581_growth: => OE2581; OE2581_growth_mu*OE2581;
    OE2581_growth_mu = 2.750584e-5;
end
